OpenVSP model (file version 5), 7 components.
Geometry view with OpenVSP parameter names; values to 6 digits, angles in degrees, lengths in the model's unit.
Overall bounding box: X_Min=0 X_Len=1.0494 Y_Min=-0.709475 Y_Len=1.41895 Z_Min=-0.0793775 Z_Len=0.382007

Wing "main_wing"
  location (X Y Z) 0.3 0 0.05, rotation 0 0 0
  symmetric about XZ
  bounding box size 0.3 1.41895 0.0410533
  totals: TotalSpan=1.40021 TotalProjectedSpan=1.4 TotalChord=0.215 TotalArea=0.26184 TotalAR=7.48549
  root: chord 0.3, twist 0, NACA 4-series Camber=0 CamberLoc=0.2 ThickChord=0.128021
  sections:
    n  Span       Root_Chord  Tip_Chord  Area       Sweep  Sweep_Location  Dihedral  Twist  Twist_Location  tip airfoil
    1  0.0700107  0.3         0.2        0.0175027  8.5    0.25            1         0      0.25            NACA 4-series Camber=0 CamberLoc=0.2 ThickChord=0.18
    2  0.630096   0.2         0.16       0.113417   0      0.25            1         0      0.25            NACA 4-series Camber=0 CamberLoc=0.2 ThickChord=0.12

Wing "horizontal_tail"
  location (X Y Z) 0.8 0 0.025, rotation 0 0 0
  symmetric about XZ
  bounding box size 0.191345 0.555845 0.037272
  totals: TotalSpan=0.549815 TotalProjectedSpan=0.547723 TotalChord=0.109545 TotalArea=0.0602292 TotalAR=4.98097
  root: chord 0.146059, twist 0, NACA 4-series Camber=0 CamberLoc=0.2 ThickChord=0.12
  sections:
    n  Span      Root_Chord  Tip_Chord  Area       Sweep  Sweep_Location  Dihedral  Twist  Twist_Location  tip airfoil
    1  0.274907  0.146059    0.0730297  0.0301146  20     0.25            5         0      0.25            as above

Wing "vertical_tail"
  location (X Y Z) 0.8 0 0.025, rotation 90 0 0
  bounding box size 0.249401 0.017535 0.27763
  totals: TotalSpan=0.273861 TotalProjectedSpan=0.273861 TotalChord=0.109545 TotalArea=0.03 TotalAR=2.5
  root: chord 0.146059, twist 0, NACA 4-series Camber=0 CamberLoc=0.2 ThickChord=0.12
  sections:
    n  Span      Root_Chord  Tip_Chord  Area  Sweep  Sweep_Location  Dihedral  Twist  Twist_Location  tip airfoil
    1  0.273861  0.146059    0.0730297  0.03  30     0.25            0         0      0.25            as above

Fuselage "eVTOL_Fuselage"
  location (X Y Z) 0 0 0, rotation 0 0 0
  bounding box size 1 0.159363 0.158208
  Design: Length=1
  cross sections:
    n  XLocPercent  YLocPercent  ZLocPercent  shape
    0  0            0            0            point
    1  0.06         0            0            ellipse Ellipse_Height=0.08 Ellipse_Width=0.1
    2  0.2          0            0            ellipse Ellipse_Height=0.15 Ellipse_Width=0.15
    3  0.5          0            0            as above
    4  0.8          0            0.01         ellipse Ellipse_Height=0.1 Ellipse_Width=0.08
    5  1            0            0.02         ellipse Ellipse_Height=0.01 Ellipse_Width=0.01
    6  1            0            0.02         point

Fuselage "boom_R"
  location (X Y Z) 0.1 0.35 0.06, rotation 0 0 0
  bounding box size 0.66 0.0360542 0.0491025
  Design: Length=0.66
  cross sections:
    n  XLocPercent  YLocPercent  ZLocPercent  shape
    0  0            0            0            point
    1  0.151515     0            0            ellipse Ellipse_Height=0.03 Ellipse_Width=0.03
    2  0.530303     0            0            as above
    3  0.848485     0            0            as above
    4  1            0            0.02         point

Fuselage "boom_L"
  location (X Y Z) 0.1 -0.35 0.06, rotation 0 0 0
  bounding box size 0.66 0.0360542 0.0491025
  Design: Length=0.66
  cross sections:
    n  XLocPercent  YLocPercent  ZLocPercent  shape
    0  0            0            0            point
    1  0.151515     0            0            ellipse Ellipse_Height=0.03 Ellipse_Width=0.03
    2  0.530303     0            0            as above
    3  0.848485     0            0            as above
    4  1            0            0.02         point

Mesh "MeshGeom"
  location (X Y Z) 0 0 0, rotation 0 0 0
  triangle mesh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
